New Line.R1-R2 Linecode=UG1 bus1=2 bus2=3 length=0.035 units=km
New Line.R2-R3 Linecode=UG1 bus1=3 bus2=4 length=0.035 units=km
New Line.R3-R4 Linecode=UG1 bus1=4 bus2=5 length=0.035 units=km
New Line.R4-R5 Linecode=UG1 bus1=5 bus2=6 length=0.035 units=km
New Line.R5-R6 Linecode=UG1 bus1=6 bus2=7 length=0.035 units=km
New Line.R6-R7 Linecode=UG1 bus1=7 bus2=8 length=0.035 units=km
New Line.R7-R8 Linecode=UG1 bus1=8 bus2=9 length=0.035 units=km
New Line.R8-R9 Linecode=UG1 bus1=9 bus2=10 length=0.035 units=km
New Line.R9-R10 Linecode=UG1 bus1=10 bus2=11 length=0.035 units=km
New Line.R3-R11 Linecode=UG3 bus1=4 bus2=12 length=0.03 units=km
New Line.R4-R12 Linecode=UG3 bus1=5 bus2=13 length=0.035 units=km
New Line.R12-R13 Linecode=UG3 bus1=13 bus2=14 length=0.035 units=km
New Line.R13-R14 Linecode=UG3 bus1=14 bus2=15 length=0.035 units=km
New Line.R14-R15 Linecode=UG3 bus1=15 bus2=16 length=0.03 units=km
New Line.R6-R16 Linecode=UG3 bus1=7 bus2=17 length=0.03 units=km
New Line.R9-R17 Linecode=UG3 bus1=10 bus2=18 length=0.03 units=km
New Line.R10-R18 Linecode=UG3 bus1=11 bus2=19 length=0.03 units=km
New Line.I1-I2 Linecode=UG2 bus1=21 bus2=22 length=0.2 units=km
New Line.C1-C2 Linecode=OH1 bus1=24 bus2=25 length=0.03 units=km
New Line.C2-C3 Linecode=OH1 bus1=25 bus2=26 length=0.03 units=km
New Line.C3-C4 Linecode=OH1 bus1=26 bus2=27 length=0.03 units=km
New Line.C4-C5 Linecode=OH1 bus1=27 bus2=28 length=0.03 units=km
New Line.C5-C6 Linecode=OH1 bus1=28 bus2=29 length=0.03 units=km
New Line.C6-C7 Linecode=OH1 bus1=29 bus2=30 length=0.03 units=km
New Line.C7-C8 Linecode=OH1 bus1=30 bus2=31 length=0.03 units=km
New Line.C8-C9 Linecode=OH1 bus1=31 bus2=32 length=0.03 units=km
New Line.C3-C10 Linecode=OH2 bus1=26 bus2=33 length=0.03 units=km
New Line.C10-C11 Linecode=OH2 bus1=33 bus2=34 length=0.03 units=km
New Line.C11-C12 Linecode=OH3 bus1=34 bus2=35 length=0.03 units=km
New Line.C11-C13 Linecode=OH3 bus1=34 bus2=36 length=0.03 units=km
New Line.C10-C14 Linecode=OH3 bus1=33 bus2=37 length=0.03 units=km
New Line.C5-C15 Linecode=OH2 bus1=28 bus2=38 length=0.03 units=km
New Line.C15-C16 Linecode=OH2 bus1=38 bus2=39 length=0.03 units=km
New Line.C15-C17 Linecode=OH3 bus1=38 bus2=40 length=0.03 units=km
New Line.C16-C18 Linecode=OH3 bus1=39 bus2=41 length=0.03 units=km
New Line.C8-C19 Linecode=OH3 bus1=31 bus2=42 length=0.03 units=km
New Line.C9-C20 Linecode=OH3 bus1=32 bus2=43 length=0.03 units=km
New Line.S1 Linecode=NA2XS2Y bus1=0 bus2=1 length=0.3 units=km
New Line.S2 Linecode=NA2XS2Y bus1=0 bus2=20 length=0.3 units=km
New Line.S3 Linecode=NA2XS2Y bus1=0 bus2=23 length=0.3 units=km
