New Monitor.MonitorAtVSource0 element=VSource.source Terminal=1 mode=0
New Monitor.MonitorAtGeneratorPV1 element=PVSystem.PV1 Terminal=1 mode=0
New Monitor.MonitorAtGeneratorPV2 element=PVSystem.PV2 Terminal=1 mode=0
New Monitor.MonitorAtGeneratorPV3 element=PVSystem.PV3 Terminal=1 mode=0
New Monitor.MonitorAtLoadR1 element=Load.R1 Terminal=1 mode=0
New Monitor.MonitorAtLoadR11 element=Load.R11 Terminal=1 mode=0
New Monitor.MonitorAtLoadR15 element=Load.R15 Terminal=1 mode=0
New Monitor.MonitorAtLoadR16 element=Load.R16 Terminal=1 mode=0
New Monitor.MonitorAtLoadR17 element=Load.R17 Terminal=1 mode=0
New Monitor.MonitorAtLoadR18 element=Load.R18 Terminal=1 mode=0
New Monitor.MonitorAtLoadI2 element=Load.I2 Terminal=1 mode=0
New Monitor.MonitorAtLoadC1 element=Load.C1 Terminal=1 mode=0
New Monitor.MonitorAtLoadC12 element=Load.C12 Terminal=1 mode=0
New Monitor.MonitorAtLoadC13 element=Load.C13 Terminal=1 mode=0
New Monitor.MonitorAtLoadC14 element=Load.C14 Terminal=1 mode=0
New Monitor.MonitorAtLoadC17 element=Load.C17 Terminal=1 mode=0
New Monitor.MonitorAtLoadC18 element=Load.C18 Terminal=1 mode=0
New Monitor.MonitorAtLoadC19 element=Load.C19 Terminal=1 mode=0
New Monitor.MonitorAtLoadC20 element=Load.C20 Terminal=1 mode=0
New Monitor.MonitorAtBus2 element=Line.R1-R2 Terminal=1 mode=0
New Monitor.MonitorAtBus3 element=Line.R1-R2 Terminal=2 mode=0
New Monitor.MonitorAtBus4 element=Line.R2-R3 Terminal=2 mode=0
New Monitor.MonitorAtBus5 element=Line.R3-R4 Terminal=2 mode=0
New Monitor.MonitorAtBus6 element=Line.R4-R5 Terminal=2 mode=0
New Monitor.MonitorAtBus7 element=Line.R5-R6 Terminal=2 mode=0
New Monitor.MonitorAtBus8 element=Line.R6-R7 Terminal=2 mode=0
New Monitor.MonitorAtBus9 element=Line.R7-R8 Terminal=2 mode=0
New Monitor.MonitorAtBus10 element=Line.R8-R9 Terminal=2 mode=0
New Monitor.MonitorAtBus11 element=Line.R9-R10 Terminal=2 mode=0
New Monitor.MonitorAtBus12 element=Line.R3-R11 Terminal=2 mode=0
New Monitor.MonitorAtBus13 element=Line.R4-R12 Terminal=2 mode=0
New Monitor.MonitorAtBus14 element=Line.R12-R13 Terminal=2 mode=0
New Monitor.MonitorAtBus15 element=Line.R13-R14 Terminal=2 mode=0
New Monitor.MonitorAtBus16 element=Line.R14-R15 Terminal=2 mode=0
New Monitor.MonitorAtBus17 element=Line.R6-R16 Terminal=2 mode=0
New Monitor.MonitorAtBus18 element=Line.R9-R17 Terminal=2 mode=0
New Monitor.MonitorAtBus19 element=Line.R10-R18 Terminal=2 mode=0
New Monitor.MonitorAtBus21 element=Line.I1-I2 Terminal=1 mode=0
New Monitor.MonitorAtBus22 element=Line.I1-I2 Terminal=2 mode=0
New Monitor.MonitorAtBus24 element=Line.C1-C2 Terminal=1 mode=0
New Monitor.MonitorAtBus25 element=Line.C1-C2 Terminal=2 mode=0
New Monitor.MonitorAtBus26 element=Line.C2-C3 Terminal=2 mode=0
New Monitor.MonitorAtBus27 element=Line.C3-C4 Terminal=2 mode=0
New Monitor.MonitorAtBus28 element=Line.C4-C5 Terminal=2 mode=0
New Monitor.MonitorAtBus29 element=Line.C5-C6 Terminal=2 mode=0
New Monitor.MonitorAtBus30 element=Line.C6-C7 Terminal=2 mode=0
New Monitor.MonitorAtBus31 element=Line.C7-C8 Terminal=2 mode=0
New Monitor.MonitorAtBus32 element=Line.C8-C9 Terminal=2 mode=0
New Monitor.MonitorAtBus33 element=Line.C3-C10 Terminal=2 mode=0
New Monitor.MonitorAtBus34 element=Line.C10-C11 Terminal=2 mode=0
New Monitor.MonitorAtBus35 element=Line.C11-C12 Terminal=2 mode=0
New Monitor.MonitorAtBus36 element=Line.C11-C13 Terminal=2 mode=0
New Monitor.MonitorAtBus37 element=Line.C10-C14 Terminal=2 mode=0
New Monitor.MonitorAtBus38 element=Line.C5-C15 Terminal=2 mode=0
New Monitor.MonitorAtBus39 element=Line.C15-C16 Terminal=2 mode=0
New Monitor.MonitorAtBus40 element=Line.C15-C17 Terminal=2 mode=0
New Monitor.MonitorAtBus41 element=Line.C16-C18 Terminal=2 mode=0
New Monitor.MonitorAtBus42 element=Line.C8-C19 Terminal=2 mode=0
New Monitor.MonitorAtBus43 element=Line.C9-C20 Terminal=2 mode=0
New Monitor.MonitorAtBus0 element=Line.S1 Terminal=1 mode=0
New Monitor.MonitorAtBus1 element=Line.S1 Terminal=2 mode=0
New Monitor.MonitorAtBus20 element=Line.S2 Terminal=2 mode=0
New Monitor.MonitorAtBus23 element=Line.S3 Terminal=2 mode=0
